OpenVSP model (file version 4), 17 components.
Geometry view with OpenVSP parameter names; values to 6 digits, angles in degrees, lengths in the model's unit.
Overall bounding box: X_Min=-13.454 X_Len=26.9568 Y_Min=-11.3728 Y_Len=25.5702 Z_Min=-7.31252 Z_Len=11.7221

Propeller "Rotor1"
  location (X Y Z) -8.1 8.1 1.5, rotation 0 87 0
  bounding box size 10.6899 9.27486 0.657727
  Design: Diameter=12 NumBlade=3 Beta34=20 UseBeta34Flag=1 Feather=20 Rotate=0 ReverseFlag=0 FoldAngle=0 AF=48.4803
  cross sections:
    n  RadiusFrac  shape
    0  0.2         circle Circle_Diameter=0.48
    1  0.45        NACA 4-series Camber=0.05 CamberLoc=0.4 Chord=0.438333 ThickChord=0.12
    2  0.7         NACA 4-series Camber=0.05 CamberLoc=0.4 Chord=0.396667 ThickChord=0.05
    3  1           NACA 4-series Camber=0.01 CamberLoc=0.4 Chord=0.3 ThickChord=0.03
  Chord along r/R (linear): 0.2: 0.08, 0.92: 0.06, 1: 0.05
  Twist along r/R (PCHIP): 0.2: 11, 0.75: 0, 1: -2

Ellipsoid "HUB1", child of "Rotor1"
  location (X Y Z) -8.85 8.1 1.25, rotation 0 -3 0
  bounding box size 1.55575 1.5 2.04062
  Design: A_Radius=0.75 B_Radius=0.75 C_Radius=1

Propeller "Rotor2"
  location (X Y Z) -8.1 -8.1 1.5, rotation 0 87 0
  bounding box size 10.708 9.28172 0.642512
  Design: Diameter=12 NumBlade=3 Beta34=20 UseBeta34Flag=1 Feather=20 Rotate=0 ReverseFlag=1 FoldAngle=0 AF=48.4803
  cross sections:
    n  RadiusFrac  shape
    0  0.2         circle Circle_Diameter=0.48
    1  0.45        NACA 4-series Camber=0.05 CamberLoc=0.4 Chord=0.438333 ThickChord=0.12
    2  0.7         NACA 4-series Camber=0.05 CamberLoc=0.4 Chord=0.396667 ThickChord=0.05
    3  1           NACA 4-series Camber=0.01 CamberLoc=0.4 Chord=0.3 ThickChord=0.03
  blade curves as in "Rotor1"

Ellipsoid "HUB2", child of "Rotor2"
  location (X Y Z) -8.85 -8.1 1.25, rotation 0 -3 0
  bounding box size 1.55575 1.5 2.04062
  Design: A_Radius=0.75 B_Radius=0.75 C_Radius=1

Propeller "Rotor3"
  location (X Y Z) 8.1 8.1 3.6, rotation 0 87 0
  bounding box size 10.7001 9.27486 0.642267
  Design: Diameter=12 NumBlade=3 Beta34=20 UseBeta34Flag=1 Feather=20 Rotate=0 ReverseFlag=1 FoldAngle=0 AF=48.4803
  cross sections:
    n  RadiusFrac  shape
    0  0.2         circle Circle_Diameter=0.48
    1  0.45        NACA 4-series Camber=0.05 CamberLoc=0.4 Chord=0.438333 ThickChord=0.12
    2  0.7         NACA 4-series Camber=0.05 CamberLoc=0.4 Chord=0.396667 ThickChord=0.05
    3  1           NACA 4-series Camber=0.01 CamberLoc=0.4 Chord=0.3 ThickChord=0.03
  blade curves as in "Rotor1"

Ellipsoid "HUB3", child of "Rotor3"
  location (X Y Z) 7.4 8.1 3.35, rotation 0 -3 0
  bounding box size 1.55575 1.5 2.04062
  Design: A_Radius=0.75 B_Radius=0.75 C_Radius=1

Propeller "Rotor4"
  location (X Y Z) 8.1 -8.1 3.6, rotation 0 87 0
  bounding box size 10.7205 9.38066 0.659326
  Design: Diameter=12 NumBlade=3 Beta34=20 UseBeta34Flag=1 Feather=20 Rotate=0 ReverseFlag=0 FoldAngle=0 AF=48.4803
  cross sections:
    n  RadiusFrac  shape
    0  0.2         circle Circle_Diameter=0.48
    1  0.45        NACA 4-series Camber=0.05 CamberLoc=0.4 Chord=0.438333 ThickChord=0.12
    2  0.7         NACA 4-series Camber=0.05 CamberLoc=0.4 Chord=0.396667 ThickChord=0.05
    3  1           NACA 4-series Camber=0.01 CamberLoc=0.4 Chord=0.3 ThickChord=0.03
  blade curves as in "Rotor1"

Ellipsoid "HUB4", child of "Rotor4"
  location (X Y Z) 7.4 -8.1 3.35, rotation 0 -3 0
  bounding box size 1.55575 1.5 2.04062
  Design: A_Radius=0.75 B_Radius=0.75 C_Radius=1

Wing "WingGeom"
  location (X Y Z) 0 0 0.5, rotation 0 0 0
  symmetric about XZ
  bounding box size 8.79113 16.9289 2.80928
  totals: TotalSpan=17.19 TotalProjectedSpan=16.9289 TotalChord=2.1 TotalArea=30.8086
  root: chord 3.2, twist 0, NACA 4-series Camber=0.027 CamberLoc=0.245455 DeltaX=-0.0272727 DeltaY=-0.05 Scale=1.02727 ThickChord=0.1
  sections:
    n  Span     Root_Chord  Tip_Chord  Area     Sweep   Sweep_Location  Dihedral  Twist  Twist_Location  tip airfoil
    1  1.72049  3.2         2.3        4.73133  46.686  0               10        0      0.25            NACA 4-series Camber=0 CamberLoc=0.2 DeltaY=-0.1 ThickChord=0.272727
    2  1.39821  2.3         2          3.00615  46.686  0               10        0      0.25            NACA 4-series Camber=0 CamberLoc=0.2 DeltaX=-0.107438 ThickChord=0.2
    3  5.47631  2           0.8        7.66684  40      0               10        0      0.25            NACA 4-series Camber=0 CamberLoc=0.2 DeltaY=1.23967 ThickChord=0.2

Wing "WingGeom", child of "WingGeom"
  location (X Y Z) -0.321782 0 0.4, rotation -180 0 0; relative location -0.321782 0 0.4, rotation 0 180 180
  symmetric about XZ
  bounding box size 11.8097 17.1781 1.00178
  totals: TotalSpan=17.1781 TotalProjectedSpan=17.1781 TotalChord=2 TotalArea=34.763
  root: chord 3.2, twist 0, NACA 4-series Camber=0 CamberLoc=0.2 ThickChord=0.2
  sections:
    n  Span     Root_Chord  Tip_Chord  Area     Sweep  Sweep_Location  Dihedral  Twist      Twist_Location  tip airfoil
    1  4.46403  3.2         2          11.6065  -45    0               0         -0.247934  0.25            NACA 4-series Camber=0 CamberLoc=0.2 DeltaY=-0.15 Invert=1 ThickChord=0.2
    2  4.125    2           0.8        5.775    -45    0               0         1.98347    0.25            NACA 4-series Camber=0 CamberLoc=0.2 DeltaY=-0.75 Invert=1 ThickChord=0.2

Custom "PodMan"
  location (X Y Z) 0.47619 0 -0.2, rotation -180 80 -180
  bounding box size 3.10588 2.12571 4.67753
  Design: ElbowAngle=45 Height=6 HipAngle=90 KneeAngle=-90 PresetTrigger=0 Presets=4 ShoulderAngle=45
  custom script PodMan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

Custom "Seat"
  location (X Y Z) -0.2 0 -4.28095, rotation 0 -90 0
  bounding box size 2.16639 1.5 3.40442
  Design: BackAngle=10 BackHeight=3 BackThick=0.3 SeatHeight=0.3 SeatLength=1.5 Width=1.5
  custom script Seat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

Fuselage "FuselageGeom"
  location (X Y Z) -5.43478 0 -3, rotation 0 0 0
  bounding box size 10.1422 4.87486 6.65038
  Design: Length=9
  cross sections:
    n  XLocPercent  YLocPercent  YRotate  ZLocPercent  shape
    0  0            0            0        -0.0881971   point
    1  0.442409     0            25       0.0434783    general fuselage BotStr=0.790227 BotTanAngle=49.9091 CornerRad=0.265455 Height=7 LowStr=1.1405 MaxWidthLoc=-0.190909 TopStr=0.183979 TopTanAngle=81 UpStr=1.79459 Width=5
    2  0.701752     0            25       0.05         general fuselage BotStr=1.51674 BotTanAngle=63.4091 CornerRad=0.428099 Height=7 LowStr=0.894874 MaxWidthLoc=0.236364 TopStr=0.915909 TopTanAngle=85.5 UpStr=0.973227 Width=4.90909
    3  0.835598     0            25       0.0326087    general fuselage BotStr=1.13127 BotTanAngle=90 CornerRad=0 Height=6.5 LowStr=1.59313 MaxWidthLoc=0.336364 TopStr=0.83 TopTanAngle=90 UpStr=0.424227 Width=4.5
    4  1            0            0        0.195511     point

Custom "Battery1"
  location (X Y Z) 0.952381 0 -3.58333, rotation 0 0 0
  bounding box size 1 3.15 1
  Design: Height=1 Length=1 SquareFlag=0 Width=3.15
  custom script Box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

Custom "Battery2", child of "Battery1"
  location (X Y Z) -2.5 -1 -4.53571, rotation 10 0 -1.19048
  symmetric about XZ
  bounding box size 3.51963 2.80958 1.08428
  Design: Height=1 Length=3.51 SquareFlag=0 Width=0.5
  custom script Box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

Wing "Front Landing Gear"
  location (X Y Z) -4.7 0.5 -5.25, rotation 0 0 0
  symmetric about XZ
  bounding box size 1.6 7.06218 1.94607
  totals: TotalSpan=7 TotalProjectedSpan=6.06218 TotalChord=1.3 TotalArea=9.1
  root: chord 1.6, twist 0, NACA 4-series Camber=0 CamberLoc=0.2 ThickChord=0.12
  sections:
    n  Span  Root_Chord  Tip_Chord  Area  Sweep  Sweep_Location  Dihedral  Twist  Twist_Location  tip airfoil
    1  3.5   1.6         1          4.55  0      0               -30       0      0.25            NACA 4-series Camber=0 CamberLoc=0.2 ThickChord=0.2

Wing "Rear Landing Gear"
  location (X Y Z) 0 0.25 -5.5, rotation 0 0 0
  symmetric about XZ
  bounding box size 3.45073 6.56218 1.92056
  totals: TotalSpan=7 TotalProjectedSpan=6.06218 TotalChord=1.4 TotalArea=9.8
  root: chord 1.8, twist 0, NACA 4-series Camber=0 CamberLoc=0.2 ThickChord=0.12
  sections:
    n  Span  Root_Chord  Tip_Chord  Area  Sweep  Sweep_Location  Dihedral  Twist  Twist_Location  tip airfoil
    1  3.5   1.8         1          4.9   35     0               -30       0      0.25            NACA 4-series Camber=0 CamberLoc=0 ThickChord=0.125

VSPAERO settings: Sref=49.5 bref=22 cref=2.25 Xcg=9.04452 Ycg=-0.0104482 Zcg=2.09208 AlphaStart=1 AlphaEnd=10 AlphaNpts=3 BetaStart=0 BetaEnd=0 BetaNpts=1 MachStart=0 MachEnd=0 MachNpts=1 ReCref=1e+07 Vinf=100 Rho=0.002377
